units           metal
boundary        p p p
atom_style      atomic
processors      * * *
neighbor        2.0 bin
neigh_modify    every 10 delay 0 check no

read_data       lmp.config

pair_style      matpl
pair_coeff      * * 1 1 forcefield.ff 14 6
velocity        all create 300 206952 dist gaussian
timestep        0.001
fix             1 all nvt temp 300 300 0.1
thermo_style    custom step pe ke etotal temp vol press
thermo          1
dump            1 all custom 1 traj.xyz id type x y z  vx vy vz fx fy fz
run             1000
